// SBML level 3 version 2
// Created with https://github.com/matthiaskoenig/sbmlutils.

model dapagliflozin_kidney(Vext, Vki, Vurine, d3g_ext, d3g_urine, dap_ext, dap_urine)
  // Model for renal dapagliflozin and dapagliflozin-3-o-glucuronide excretion.
  // ~82 % in urine (2% dap, 80% metabolites)[Callegari2021]; (2% dap, 72% metabolites)[Jo2021]
  // ~18 % in feces (16% dap, 2% metabolites)[Callegari2021]; (1.7% metabolites)[Jo2021]
  // kidney impairment has strong effect on dap and d3g plasma concentration (increase)
  // => mainly renal excretion of d3g, small excretion of dag (~1-2%)
  // version 3
  // Changelog
  // version 1
  // initial model
  // Terms of use
  // The content of this model has been carefully created in a manual research effort. This file has been created by Matthias König using sbmlutils. For questions contact koenigmx@hu-berlin.de. Copyright © 2024 Matthias König.
  // This work is licensed under a Creative Commons Attribution 4.0 International License.
  // Redistribution and use of any part of this model, with or without modification, are permitted provided that the following conditions are met:
  // Redistributions of this SBML file must retain the above copyright notice, this list of conditions and the following disclaimer.
  // Redistributions in a different form must reproduce the above copyright notice, this list of conditions and the following disclaimer in the documentation and/or other materials provided with the distribution.
  // This model is distributed in the hope that it will be useful, but WITHOUT ANY WARRANTY; without even the implied warranty of MERCHANTABILITY or FITNESS FOR A PARTICULAR PURPOSE.
  // model units - substance: mmole, time: min, volume: litre, area: m2, length: metre, extent: mmole

  // Compartments:
  compartment Vext = 1.5 litre; Vext is "plasma";  // SBO:0000290 ncit:C13356 BTO:0000131
  compartment Vki = 0.3 litre; Vki is "kidney";  // SBO:0000290 FMA:7203 BTO:0000671 ncit:C12415
  compartment Vmem = NaN; Vmem has m2; Vmem is "plasma membrane";  // 2-D; SBO:0000290 ncit:C13735 FMA:63841 GO:0005886
  compartment Vurine = 1 litre;  // SBO:0000290 FMA:12274 ncit:C13283 BTO:0001419

  // Species:
  species d3g_ext in Vext = 0; d3g_ext is "dapagliflozin-3-o-glucuronide (plasma)";  // SBO:0000247 pubchem.compound:91617971 inchikey:ZYZULHSUKTZGTR-PTNNFGGUSA-N
  substanceOnly species d3g_urine in Vurine = 0; d3g_urine is "dapagliflozin-3-o-glucuronide (urine)";  // SBO:0000247 pubchem.compound:91617971 inchikey:ZYZULHSUKTZGTR-PTNNFGGUSA-N
  species dap_ext in Vext = 0; dap_ext is "dapagliflozin (plasma)";  // SBO:0000247 CHEBI:85078 ncit:C78126
  substanceOnly species dap_urine in Vurine = 0; dap_urine is "dapagliflozin (urine)";  // SBO:0000247 CHEBI:85078 ncit:C78126
  species $glc_ext in Vext = 5; glc_ext is "glucose (plasma)";  // SBO:0000247 CHEBI:4167 ncit:C2831
  substanceOnly species glc_urine in Vurine = 0; glc_urine is "glucose (urine)";  // SBO:0000247 CHEBI:4167 ncit:C2831

  // Parameters:
  // scaling factor for renal function. 1.0: normal renal function; <1.0: reduced renal function
  f_renal_function = 1 dimensionless; f_renal_function is "parameter for renal function";  // SBO:0000009
  Mr_glc = 180 g_per_mole; Mr_glc is "Molecular weight glc [g/mole]";  // SBO:0000647
  cf_mg_per_g = 1000 mg_per_g; cf_mg_per_g is "Conversion factor mg per g";
  cf_ml_per_l = 1000 ml_per_l; cf_ml_per_l is "Conversion factor ml per l";
  // ~10 ng/ml graphical estimate for low doses [Komoroski2009]
  RTG_E50 = 2.5e-6 mM; RTG_E50 is "EC50 reduction in RTG";  // SBO:0000009
  RTG_gamma = 1 dimensionless; RTG_gamma is "hill coefficient reduction in RTG";  // SBO:0000009
  // typical RTG value without SGLT2 inhibitors in healthy subjects
  RTG_base = 12.5 mM; RTG_base is "Baseline RTG value";
  // ΔRTG, maximum reduction in RTG due to SGLT2 inhibition
  RTG_delta = 9 mM; RTG_delta is "RTG value";
  GFR_healthy = 100 ml_per_min; GFR_healthy is "Glomerular filtration rate (healthy)";
  D3GEX_k = 1 per_min; D3GEX_k is "rate urinary excretion of dapagliflozin-3-o-glucuronide";  // SBO:0000009
  DAPEX_k = 1 per_min; DAPEX_k is "rate urinary excretion of dapagliflozin";  // SBO:0000009
  RTG has mM; RTG is "renal threshold glucose (RTG)";
  GFR has ml_per_min; GFR is "glomerular filtration rate";
  UGE has gram; UGE is "urinary glucose excretion (UGE)";

  // Assignment rules:
  // Renal threshold glucose.
  // The renal threshold for glucose (RTG) is the plasma glucose concentration at which tubular reabsorption of glucose begins to saturate; glucose is excreted into the urine in direct proportion to the glucose concentration above this threshold. 12.3 - 12.7 mM RTG (placebo) [Devineni2012]
  RTG := RTG_base - RTG_delta*dap_ext^RTG_gamma/(RTG_E50^RTG_gamma + dap_ext^RTG_gamma);
  GFR := f_renal_function*GFR_healthy;
  // Urinary glucose excretion is calculated from cumulative amount of glucose in urine.
  UGE := glc_urine*Mr_glc/cf_mg_per_g;

  // Reactions:
  D3GEX: d3g_ext => d3g_urine; f_renal_function*D3GEX_k*Vki*d3g_ext; D3GEX is "dapagliflozin-3-o-glucuronide excretion (D3GEX)";  // SBO:0000655
  DAPEX: dap_ext => dap_urine; f_renal_function*DAPEX_k*Vki*dap_ext; DAPEX is "dapagliflozin excretion (DAPEX)";  // SBO:0000655
  GLCEX: $glc_ext => glc_urine; piecewise(GFR/cf_ml_per_l*(glc_ext - RTG), glc_ext > RTG, 0 mmole_per_min); GLCEX is "glucose excretion (GLCEX)";  // modifiers: dap_ext; SBO:0000655

  // Unit definitions:
  unit g_per_mole = gram / mole; g_per_mole is "g/mole";
  unit l_per_min = litre / (60 second); l_per_min is "l/min";
  unit m2 = metre^2; m2 is "meter^2";
  unit mM = 1e-3 mole / litre; mM is "mmole/liter";
  unit mg = 1e-3 gram;
  unit mg_per_g = 1e-3 gram / gram; mg_per_g is "mg/g";
  unit mg_per_s_l = 1e-3 gram / (second * litre); mg_per_s_l is "mg/s/l";
  unit min = 60 second;
  unit min_per_hr = 60 second / (3600 second); min_per_hr is "min/hour";
  unit ml_per_l = 1e-3 litre / litre; ml_per_l is "ml/l";
  unit ml_per_min = 1e-3 litre / (60 second); ml_per_min is "ml/min";
  unit mmole = 1e-3 mole;
  unit mmole_per_min = 1e-3 mole / (60 second); mmole_per_min is "mmole/min";
  unit mmole_per_min_l = 1e-3 mole / (60 second * litre); mmole_per_min_l is "mmole/min/l";
  unit per_min = 1 / (60 second); per_min is "1/min";
  unit per_mmole = 1 / (1e-3 mole); per_mmole is "1/mmole";
end
